// COMSOL Multiphysics 6.3.0.335 model "Tesla_valve_free_slip_topology_optimization_share - Copy.mph"
// Outline of the model tree
// Unit system: none

Parameters
  Da = 1e-5
  alpha_max = 1/(Re*Da)  // Upper limit of alpha
  alpha_min = 1e-6  // Lower limit of alpha
  rho = 1[kg/m^3]
  mu = 0.01e0[Pa*s]
  Re = rho*Uin*L2/mu
  L1 = 1.5*1[m]
  L2 = 1*1[m]
  Uin = 1
  R1 = hmax*4
  eta = 0.5
  beta = 12
  R2 = hmax*6
  eta_psi = 0.5
  beta_psi = 12
  a_elips = 0.5
  b_elips = 0.1
  qa = 150
  hmax = 0.0125/2*1.3
  Minelsize = 0.03/2
  psimax = 100
  penalty = 2
  theta0 = Volfrac
  Volfrac = 0.5

Functions
  an1: Analytic | funcname = Brinkman; expr = alphamin+(alphamax-alphamin)*(1-x)/(1+q*(x)); args = {alphamin, alphamax, x, q}; argunit = {kg/(m^3*s), kg/(m^3*s), 1, 1}
  an2: Analytic "Projection" | funcname = Projection; expr = ( tanh(beta*eta) + tanh(beta*(gammaf-eta)) )/( tanh(beta*eta) + tanh(beta*(1-eta)) ); args = {eta, beta, gammaf}
  an3: Analytic "Projection 1" | funcname = PsiProjection; expr = ( tanh( beta_psi*eta_psi) + tanh( beta_psi*( psi-eta_psi)) )/( tanh( beta_psi*eta_psi) + tanh( beta_psi*(1-eta_psi)) ); args = {eta_psi, beta_psi, psi}
  an4: Analytic | funcname = Brinkman4; expr = alphamin+(alphamax-alphamin)*(1-x)/(1+q*(x)); args = {alphamin, alphamax, x, q}; argunit = {kg/(m^3*s), kg/(m^3*s), 1, 1}

Variables
  var1 "Variables 1"
    alpha = if(qa>0,Brinkman(alpha_min,alpha_max,gamma_p,qa), Brinkman4(alpha_min,alpha_max,gamma_p,qa))  // Brinkman(alpha_min,alpha_max,gamma_p,qa)alpha_max*(1-gamma_p)/(1+qa*gamma_p)
    u_total = u1
    v_total = u2
    Norm_U = sqrt(u_total^2+v_total^2)
  var2 "Navier_Stokes_Weak_Form"
    weaku1 = test(u1)*u1*d(u1,x1) + test(u1)*u2*d(u1,x2) + 1/Re *( d(test(u1),x1)*(d(u1,x1)+d(u1,x1)) + d(test(u1),x2)*(d(u1,x2)+d(u2,x1)) ) - d(test(u1),x1)*p
    weaku2 = test(u2)*u1*d(u2,x1) + test(u2)*u2*d(u2,x2) + 1/Re *( d(test(u2),x1)*(d(u2,x1)+d(u1,x2)) + d(test(u2),x2)*(d(u2,x2)+d(u2,x2)) ) - d(test(u2),x2)*p
    weakp = test(p)*(d(u1,x1)+d(u2,x2))
    stabu1 = (u1*d(test(u1),x1)+u2*d(test(u1),x2) )*tau*resu1
    stabu2 = (u1*d(test(u2),x1)+u2*d(test(u2),x2) )*tau*resu2
    stabp = tau*( d(test(p),x1)*resu1 + d(test(p),x2)*resu2)
    tau1 = h/(2*sqrt(max(1e-3,u1)^2+max(1e-3,u2)^2))
    tau3 = Re*h^2/12
    tau4 = 1/max(alpha,1e-10)
    tau = (tau1^-2+tau3^-2+tau4^-2)^-(1/2)
    resu1 = u1*d(u1,x1) + u2*d(u1,x2) + d(p,x1) + alpha*u1
    resu2 = u1*d(u2,x1) + u2*d(u2,x2)+ d(p,x2) + alpha*u2
    U = sqrt(u1^2+u2^2)
    U_safe = sqrt(u1^2 + u2^2+1e-6)
    weakv1 = test(v1)*v1*d(v1,x1) + test(v1)*v2*d(v1,x2) + 1/Re *( d(test(v1),x1)*(d(v1,x1)+d(v1,x1)) + d(test(v1),x2)*(d(v1,x2)+d(v2,x1)) ) - d(test(v1),x1)*p2
    weakv2 = test(v2)*v1*d(v2,x1) + test(v2)*v2*d(v2,x2) + 1/Re *( d(test(v2),x1)*(d(v2,x1)+d(v1,x2)) + d(test(v2),x2)*(d(v2,x2)+d(v2,x2)) ) - d(test(v2),x2)*p2
    resv2 = v1*d(v2,x1) + v2*d(v2,x2)+ d(p2,x2) + alpha*v2
    resv1 = v1*d(v1,x1) + v2*d(v1,x2) + d(p2,x1) + alpha*v1
    weakp2 = test(p2)*(d(v1,x1)+d(v2,x2))
    stabp2 = tav*( d(test(p2),x1)*resv1 + d(test(p2),x2)*resv2)
    tav1 = h/(2*sqrt(max(1e-3,v1)^2+max(1e-3,v2)^2))
    tav = (tav1^-2+tau3^-2+tau4^-2)^-(1/2)
    stabv2 = (v1*d(test(v2),x1)+v2*d(test(v2),x2) )*tav*resv2
    stabv1 = (v1*d(test(v1),x1)+v2*d(test(v1),x2) )*tav*resv1
  var5 "Gammap"
    gamma_p = Projection(eta, beta, gamma_f)
    gamma_c = dtopo1.theta
  var6 "Slip_Boundary_Condition_Weak_Form"
    Design_Gradient_Norm = 40 * sqrt(norm1_p^2+norm2_p^2)*((norm1*spf.K_stress_tensorxx +norm2*spf.K_stress_tensorxy) *test(u1) + (norm1*spf.K_stress_tensoryx +norm2*spf.K_stress_tensoryy)*test(u2) - (norm1*(norm1*spf.K_stress_tensorxx+norm2*spf.K_stress_tensorxy) + norm2*(norm1*spf.K_stress_tensoryx+norm2*spf.K_stress_tensoryy)) * ( (norm1*test(u1)+norm2*test(u2))))
    I_B_P_dwidxj = -alpha/alpha_max*( test(u1x1)*(spf.K_stress_tensorxx - (norm1*spf.K_stress_tensorxx*norm1+norm1*spf.K_stress_tensorxy*norm2+norm2*spf.K_stress_tensoryx*norm1+norm2*spf.K_stress_tensoryy*norm2) ) + test(u2x2)*(spf.K_stress_tensoryy - (norm1*spf.K_stress_tensorxx*norm1+norm1*spf.K_stress_tensorxy*norm2+norm2*spf.K_stress_tensoryx*norm1+norm2*spf.K_stress_tensoryy*norm2) ) + test(u1x2)*spf.K_stress_tensorxy + test(u2x1)*spf.K_stress_tensoryx )
    I_B_P_widdxj = -alpha/alpha_max*( test(u1)*d(spf.K_stress_tensorxx - (norm1*spf.K_stress_tensorxx*norm1+norm1*spf.K_stress_tensorxy*norm2+norm2*spf.K_stress_tensoryx*norm1+norm2*spf.K_stress_tensoryy*norm2) , x1 ) + test(u2)*d(spf.K_stress_tensoryy - (norm1*spf.K_stress_tensorxx*norm1+norm1*spf.K_stress_tensorxy*norm2+norm2*spf.K_stress_tensoryx*norm1+norm2*spf.K_stress_tensoryy*norm2), x2 ) + test(u1)*d(spf.K_stress_tensorxy,x2) + test(u2)*d(spf.K_stress_tensoryx,x1) )
    Design_Gradient = sqrt(dgdx1^2+dgdx2^2)*((norm1*spf.K_stress_tensorxx +norm2*spf.K_stress_tensorxy) *test(u1) + (norm1*spf.K_stress_tensoryx +norm2*spf.K_stress_tensoryy)*test(u2) - (norm1*(norm1*spf.K_stress_tensorxx+norm2*spf.K_stress_tensorxy) + norm2*(norm1*spf.K_stress_tensoryx+norm2*spf.K_stress_tensoryy)) * ( (norm1*test(u1)+norm2*test(u2))))
    Design_Gradient_Penalty = psi*((norm1*spf.K_stress_tensorxx +norm2*spf.K_stress_tensorxy) *test(u1) + (norm1*spf.K_stress_tensoryx +norm2*spf.K_stress_tensoryy)*test(u2) - (norm1*(norm1*spf.K_stress_tensorxx+norm2*spf.K_stress_tensorxy) + norm2*(norm1*spf.K_stress_tensoryx+norm2*spf.K_stress_tensoryy)) * ( (norm1*test(u1)+norm2*test(u2))))
    Design_Gradient_Penalty2 = psi*((norm1*spf.K_stress_tensorxx2 +norm2*spf.K_stress_tensorxy2) *test(v1) + (norm1*spf.K_stress_tensoryx2 +norm2*spf.K_stress_tensoryy2)*test(v2) - (norm1*(norm1*spf.K_stress_tensorxx2+norm2*spf.K_stress_tensorxy2) + norm2*(norm1*spf.K_stress_tensoryx2+norm2*spf.K_stress_tensoryy2)) * ( (norm1*test(v1)+norm2*test(v2))))
  var7 "Norm_Difinitions"
    dgdx1 = d(gamma_p_f,x1) * ((d(gamma_p_f,x1) > 1e-8) || (d(gamma_p_f,x1) < -1e-8))+1e-8*((d(gamma_p_f,x1) < 1e-8) || (d(gamma_p_f,x1) > -1e-8))
    dgdx2 = d(gamma_p_f,x2)* ((d(gamma_p_f,x2)> 1e-8) || (d(gamma_p_f,x2) < -1e-8))+1e-8*((d(gamma_p_f,x2)< 1e-8) || (d(gamma_p_f,x2) > -1e-8))
    dgdxMag = sqrt(max(1e-12, dgdx1^2 + dgdx2^2))
    maxnorm = 1.0/maxop1(sqrt(max(1e-12, dgdx1^2 + dgdx2^2)))
    norm1 = -dgdx1/dgdxMag
    norm2 = -dgdx2/dgdxMag
    norm1_p = Projection( eta_psi, beta_psi,abs(dgdx1*maxnorm))
    norm2_p = Projection( eta_psi, beta_psi, abs(dgdx2*maxnorm))
    tang1 = norm2
    tang2 = -norm1
    Gmax = sqrt(3)/R2
    psi = (psimax)*(sqrt(dgdx1^2+dgdx2^2)/Gmax)^penalty
  var8 "Stress_Components"
    spf.K_stress_tensorxx = 2 * (1.0/Re) * u1x1  // N/m²
    spf.K_stress_tensoryy = 2 * (1.0/Re) * u2x2
    spf.K_stress_tensorxy = (1.0/Re) * (u1x2 + u2x1)
    spf.K_stress_tensoryx = spf.K_stress_tensorxy
    spf.K_stress_tensorxx2 = 2 * (1.0/Re) * v1x1  // N/m²
    spf.K_stress_tensoryy2 = 2 * (1.0/Re) * v2x2
    spf.K_stress_tensorxy2 = (1.0/Re) * (v1x2 + v2x1)
    spf.K_stress_tensoryx2 = spf.K_stress_tensorxy2
  var9 "Penalty"
    Normal_Penalty = test(u1)*norm1*alpha*(u1*norm1 + u2*norm2) + test(u2)*norm2*alpha*(u1*norm1 + u2*norm2)
    Brinkman_Penalty_u1 = alpha*test(u1)*u1
    Brinkman_Penalty_u2 = alpha*test(u2)*u2
    Brinkman_Penalty_v1 = alpha*test(v1)*v1
    Brinkman_Penalty_v2 = alpha*test(v2)*v2
  var10 "dissipation"
    dissipation = 0.5*mu*((2*d(comp1.u1,x1))^2+(d(comp1.u1,x2))^2+(d(comp1.u2,x1))^2+(2*d(comp1.u2,x2))^2)+0.5*alpha*(u1^2+u2^2)  // (1-psi/psimax*(psi*(psi>1)/psimax>0.1)/max((psi/psimax*(psi/psimax>0.1)),0.0001))*
    dP_forward = aveop1(p)-aveop2(p)  // Pressure difference, forward direction
    dP_backward = aveop2(p2)-aveop1(p2)  // Pressure difference, backward direction
    Di = dP_backward/dP_forward  // Ratio of pressure differences
  var11 "Cross stablisation Joe"
    Dmat11 = 1*norm1*norm1
    Dmat12 = 1*norm1*norm2
    Dmat21 = 1*norm2*norm1
    Dmat22 = 1*norm2*norm2
    gradMagU1 = 1/2*(u1^2 + u2^2 + 1e-6)^(-1/2)*(2*u1*d(u1,x1) + 2*u2*d(u2,x1) )
    gradMagU2 = 1/2*(u1^2 + u2^2 + 1e-6)^(-1/2)*(2*u1*d(u1,x2) + 2*u2*d(u2,x2) )
    gradMagUMag = sqrt(gradMagU1^2 + gradMagU2^2+1e-6)
    rVec1 = gradMagU1/gradMagUMag
    rVec2 = gradMagU2/gradMagUMag
    sVec1 = u1/U_safe
    sVec2 = u2/U_safe
    nuDC = 1/2*U_safe^2/(Uin*U_safe)*hmax^2*gradMagUMag
    nuBrink = 1/2*hmax*alpha/(alpha_max*Uin)
    nuDCDD = max(1*nuDC , 1*nuBrink)
    resDC = 1*nuDCDD*( d(test(u1),x1)*( Dmat11*d(u1,x1) + Dmat12*d(u1,x2) ) + d(test(u1),x2)*( Dmat21*d(u1,x1) + Dmat22*d(u1,x2) ) + d(test(u2),x1)*( Dmat11*d(u2,x1) + Dmat12*d(u2,x2) ) + d(test(u2),x2)*( Dmat21*d(u2,x1) + Dmat22*d(u2,x2) ) )
  var12 "Variables 12" on boundaries 2, 5, 11
  var13 "Variables 13" on boundaries 2-5, 7-9, 11-13
    EXslipdown = ((nxinwarddown*spf.K_stress_tensorxx + nyinwarddown*spf.K_stress_tensorxy)*test(u1) + (nxinwarddown*spf.K_stress_tensoryx + nyinwarddown*spf.K_stress_tensoryy)*test(u2) - (nxinwarddown*(nxinwarddown*spf.K_stress_tensorxx + nyinwarddown*spf.K_stress_tensorxy) + nyinwarddown*(nxinwarddown*spf.K_stress_tensoryx + nyinwarddown*spf.K_stress_tensoryy))*(nxinwarddown*test(u1) + nyinwarddown*test(u2)))
    nyinwarddown = 1
    nxinwarddown = 0
    nyinwardup = -1
    nxinwardup = 0
    EXslipup = ((nxinwardup*spf.K_stress_tensorxx + nyinwardup*spf.K_stress_tensorxy)*test(u1) + (nxinwardup*spf.K_stress_tensoryx + nyinwardup*spf.K_stress_tensoryy)*test(u2) - (nxinwardup*(nxinwardup*spf.K_stress_tensorxx + nyinwardup*spf.K_stress_tensorxy) + nyinwardup*(nxinwardup*spf.K_stress_tensoryx + nyinwardup*spf.K_stress_tensoryy))*(nxinwardup*test(u1) + nyinwardup*test(u2)))
    nyinwardleft = 0
    nxinwardleft = 1
    nyinwardright = 0
    nxinwardright = -1
    EXslipleft = ((nxinwardleft*spf.K_stress_tensorxx + nyinwardleft*spf.K_stress_tensorxy)*test(u1) + (nxinwardleft*spf.K_stress_tensoryx + nyinwardleft*spf.K_stress_tensoryy)*test(u2) - (nxinwardleft*(nxinwardleft*spf.K_stress_tensorxx + nyinwardleft*spf.K_stress_tensorxy) + nyinwardleft*(nxinwardleft*spf.K_stress_tensoryx + nyinwardleft*spf.K_stress_tensoryy))*(nxinwardleft*test(u1) + nyinwardleft*test(u2)))
    EXslipright = ((nxinwardright*spf.K_stress_tensorxx + nyinwardright*spf.K_stress_tensorxy)*test(u1) + (nxinwardright*spf.K_stress_tensoryx + nyinwardright*spf.K_stress_tensoryy)*test(u2) - (nxinwardright*(nxinwardright*spf.K_stress_tensorxx + nyinwardright*spf.K_stress_tensorxy) + nyinwardright*(nxinwardright*spf.K_stress_tensoryx + nyinwardright*spf.K_stress_tensoryy))*(nxinwardright*test(u1) + nyinwardright*test(u2)))
    EXslipup2 = ((nxinwardup*spf.K_stress_tensorxx2 + nyinwardup*spf.K_stress_tensorxy2)*test(v1) + (nxinwardup*spf.K_stress_tensoryx2 + nyinwardup*spf.K_stress_tensoryy2)*test(v2) - (nxinwardup*(nxinwardup*spf.K_stress_tensorxx2 + nyinwardup*spf.K_stress_tensorxy2) + nyinwardup*(nxinwardup*spf.K_stress_tensoryx2 + nyinwardup*spf.K_stress_tensoryy2))*(nxinwardup*test(v1) + nyinwardup*test(v2)))
    EXslipdown2 = ((nxinwarddown*spf.K_stress_tensorxx2 + nyinwarddown*spf.K_stress_tensorxy2)*test(v1) + (nxinwarddown*spf.K_stress_tensoryx2 + nyinwarddown*spf.K_stress_tensoryy2)*test(v2) - (nxinwarddown*(nxinwarddown*spf.K_stress_tensorxx2 + nyinwarddown*spf.K_stress_tensorxy2) + nyinwarddown*(nxinwarddown*spf.K_stress_tensoryx2 + nyinwarddown*spf.K_stress_tensoryy2))*(nxinwarddown*test(v1) + nyinwarddown*test(v2)))
    EXslipleft2 = ((nxinwardleft*spf.K_stress_tensorxx2 + nyinwardleft*spf.K_stress_tensorxy2)*test(v1) + (nxinwardleft*spf.K_stress_tensoryx2 + nyinwardleft*spf.K_stress_tensoryy2)*test(v2) - (nxinwardleft*(nxinwardleft*spf.K_stress_tensorxx2 + nyinwardleft*spf.K_stress_tensorxy2) + nyinwardleft*(nxinwardleft*spf.K_stress_tensoryx2 + nyinwardleft*spf.K_stress_tensoryy2))*(nxinwardleft*test(v1) + nyinwardleft*test(v2)))
    EXslipright2 = ((nxinwardright*spf.K_stress_tensorxx2 + nyinwardright*spf.K_stress_tensorxy2)*test(v1) + (nxinwardright*spf.K_stress_tensoryx2 + nyinwardright*spf.K_stress_tensoryy2)*test(v2) - (nxinwardright*(nxinwardright*spf.K_stress_tensorxx2 + nyinwardright*spf.K_stress_tensorxy2) + nyinwardright*(nxinwardright*spf.K_stress_tensoryx2 + nyinwardright*spf.K_stress_tensoryy2))*(nxinwardright*test(v1) + nyinwardright*test(v2)))

Couplings
  maxop1: Maximum on domains 2
  minop1: Minimum on domains 2
  intop1: Integration on domains 2
  aveop1: Average on boundaries 1
  aveop2: Average on boundaries 14
  intop7: Integration "exslipint" on boundaries 2, 5, 11 | opname = exslipint

Common definitions
  dtopo1: DensityTopology "Density Model 1" on domains 2
    studyStep = std3/stat
    filterType = No_filter
    interpolationType = Linear_interp
    q_Darcy = 1
    theta_0 = Volfrac
  ftopom1: MaterialTopologyDomain "Prescribed Material 1" (disabled) on no domains

Geometry
  geom1 "Geometry 1" (2D, length unit m)
    r1: Rectangle | size = {L1, L2}; pos = {-L1/2, -L2/2}
    e1: Ellipse (disabled) | semiaxes = {0.5, 0.1}; pos = {-L1/2+L1/3, 0}
    pt1: Point | p = {-L1/2, L2/6}
    pt3: Point | p = {-L1/2, -L2/6}
    pt5: Point | p = {L1/2, -L2/6}
    pt8: Point | p = {L1/2, L2/6}
    r2: Rectangle | size = {L1/10, L2/3}; base = center; pos = {-L1/2-L1/20, 0}
    r3: Rectangle | size = {L1/10, L2/3}; base = center; pos = {L1/2+L1/20, 0}
    fin: Finalize "Form Union"

Physics
  w: WeakFormPDE on all domains
    dependent variable u = {u1, u2}
    ShapeProperty.order = 1
    EquationForm.form = Automatic
    Units.DependentVariableQuantity = dimensionless
    Units.CustomSourceTermUnit = 1
    wfeq1: WeakFormPDE "Weak Form PDE 1 +( I_B_P_widdxj + I_B_P_dwidxj)+Design_Gradient+ Normal_Penalty +Brinkman_Penalty_u1 +Design_Gradient_MagNorm" (default)
      weak = {weaku1 +weaku2 + Brinkman_Penalty_u1 + Brinkman_Penalty_u2 + Design_Gradient_Penalty, 0}
    zflx1: ZeroFluxBoundary "Zero Flux 1" (default)
    init1: init "Initial Values 1" (default)
    weak1: WeakContribution on boundaries 3, 13
      integrationOrder = 4
      quadratureFrame = spatial
      weakExpression = -EXslipup
      automaticQuadrature = 1
    weak2: WeakContribution on boundaries 2, 11
      integrationOrder = 4
      quadratureFrame = spatial
      weakExpression = -EXslipdown
      automaticQuadrature = 1
    dir1: DirichletBoundary "Dirichlet Boundary Condition 1" on boundaries 1 | r = {Uin, 0}
    dir3: DirichletBoundary "Dirichlet Boundary Condition 3" on boundaries 14
      r = {Uin, 0}
      useDirichletCondition = {0, 1}
    dir7: DirichletBoundary "Dirichlet Boundary Condition 7" on boundaries 5, 8
      r = {0, 0}
      useDirichletCondition = {1, 1}
    dir8: DirichletBoundary "Dirichlet Boundary Condition 8" on boundaries 4, 7, 9, 12
      r = {0, 0}
      useDirichletCondition = {1, 1}
    dir9: DirichletBoundary "Dirichlet Boundary Condition 9" on boundaries 2, 3, 11, 13
      r = {0, 0}
      useDirichletCondition = {0, 1}
  w2: WeakFormPDE on all domains
    dependent variable p
    ShapeProperty.order = 1
    EquationForm.form = Automatic
    Units.DependentVariableQuantity = dimensionless
    Units.CustomSourceTermUnit = 1
    wfeq1: WeakFormPDE (default) | weak = weakp + stabp
    zflx1: ZeroFluxBoundary "Zero Flux 1" (default)
    init1: init "Initial Values 1" (default)
    dir1: DirichletBoundary "Dirichlet Boundary Condition 1" on boundaries 14 | r = 0
  c: CoefficientFormPDE on all domains
    dependent variable gamma_f
    ShapeProperty.order = 1
    EquationForm.form = Automatic
    Units.CustomSourceTermUnit = 1
    cfeq1: CoefficientFormPDE (default) | c = {R1^2/12, 0, 0, R1^2/12}; a = 1; f = gamma_c; da = 0
    zflx1: ZeroFluxBoundary "Zero Flux 1" (default)
    init1: init "Initial Values 1" (default)
  c2: CoefficientFormPDE on all domains
    dependent variable gamma_p_f
    ShapeProperty.order = 1
    EquationForm.form = Automatic
    cfeq1: CoefficientFormPDE (default) | c = {R2^2/12, 0, 0, R2^2/12}; a = 1; f = gamma_p; da = 0
    zflx1: ZeroFluxBoundary "Zero Flux 1" (default)
    init1: init "Initial Values 1" (default)
  w3: WeakFormPDE on all domains
    dependent variable v = {v1, v2}
    ShapeProperty.order = 1
    EquationForm.form = Automatic
    wfeq1: WeakFormPDE on domains 1-3
      weak = {weakv1 +weakv2 + Brinkman_Penalty_v1 + Brinkman_Penalty_v2+ Design_Gradient_Penalty2, 0}
    init1: init "Initial Values 1" (default)
    zflx1: ZeroFluxBoundary "Zero Flux 1" (default)
    weak1: WeakContribution on boundaries 3, 13
      integrationOrder = 4
      quadratureFrame = spatial
      weakExpression = -EXslipup2
      automaticQuadrature = 1
    weak2: WeakContribution on boundaries 2, 11
      integrationOrder = 4
      quadratureFrame = spatial
      weakExpression = -EXslipdown2
      automaticQuadrature = 1
    dir1: DirichletBoundary "Dirichlet Boundary Condition 1" on boundaries 14 | r = {-Uin, 0}
    dir2: DirichletBoundary "Dirichlet Boundary Condition 2" on boundaries 5, 8
      r = {0, 0}
      useDirichletCondition = {1, 1}
    dir3: DirichletBoundary "Dirichlet Boundary Condition 3" on boundaries 1 | r = {0, 0}; useDirichletCondition = {0, 1}
    dir4: DirichletBoundary "Dirichlet Boundary Condition 4" on boundaries 4, 7, 9, 12
      r = {0, 0}
      useDirichletCondition = {1, 1}
    dir5: DirichletBoundary "Dirichlet Boundary Condition 5" on boundaries 2, 3, 11, 13
      r = {0, 0}
      useDirichletCondition = {0, 1}
  w4: WeakFormPDE on all domains
    dependent variable p2
    ShapeProperty.order = 1
    EquationForm.form = Automatic
    wfeq1: WeakFormPDE (default) | weak = weakp2+ stabp2
    init1: init "Initial Values 1" (default)
    zflx1: ZeroFluxBoundary "Zero Flux 1" (default)
    dir1: DirichletBoundary "Dirichlet Boundary Condition 1" on boundaries 1 | r = 0
  c3: CoefficientFormPDE on all domains
    dependent variable gamma_f2
    cfeq1: CoefficientFormPDE (default) | c = {R1^2/12, 0, 0, R1^2/12}; a = 1; f = gamma_p
    zflx1: ZeroFluxBoundary "Zero Flux 1" (default)
    init1: init "Initial Values 1" (default)
  sens: Sensitivity on no domains

Mesh
  mesh1 "Mesh 1"
    size: MeshSizeDefault | table = cfd; hmax = hmax; hmin = 0.001; hcurve = 0.3; hgrad = 1.08; hauto = 1; custom = on
    size1: Size on boundaries 5, 8 | table = cfd; hauto = 4
    cr1: CornerRefinement (disabled) on domains 2 | boundary = boundaries 5, 8
    ftri1: FreeTri "Free Triangular 1" on remaining entities
      size1: Size on no domains | hmax = hmax; custom = on
    bl1: BndLayer "Boundary Layers 1" (disabled) on domains 2 | sharpcorners = trim
      blp: BndLayerProp "Boundary Layer Properties" on boundaries 5, 8 | blnlayers = 3; blstretch = 1.08; blhminfact = 5

Studies
  std3 "Topology_Optimisation"
    param: Parametric "Parametric Sweep"
      pname = {beta, qa, psimax, penalty, R1, R2}
      plistarr = {"12,18,18,18,18,18,32,32", "150,100,50,30,20,5,5,1", "100,100,125,125,150,200,250,300", "1,1,1,1,1,1,1,1", "4*hmax,4*hmax,4*hmax,4*hmax,4*hmax,4*hmax,4*hmax,3*hmax", "6*hmax,6*hmax,6*hmax,6*hmax,6*hmax,6*hmax,5*hmax,4*hmax"}
      punit = {, , , , , }
      reusesol = on
    opt: Optimization
      optsolver = mma
      opttolinner = 0.01
      gradientStep = stat
      nsolvemax = 35
      keepsolgb = everynth
      nskipsols = 1
      optobj = comp1.Di
      optobjEvaluateFor = stat
      objectivetype = maximization
      objectivescaling = init
      constraintExpression = comp1.intop1(gamma_p)
      constraintUbound = 0.9
      constraintEvaluateFor = stat
      objtable = new
      convinfo = detailed
    stat: Stationary | solve for = {w, w2, c, c2, w3, w4, sens}; mesh = {geom1, mesh1}

Solver configurations
  sol25 "Solution 25" (study std3)
    v1: Variables "Dependent Variables 1"
      comp1_dtopo1_theta_c: ControlField "Control Material Volume Factor (comp1.dtopo1.theta_c)"
    o1: Optimization "Optimization Solver 1" | gradientmma = adjoint; movelimit = 0.2
      s1: StationaryAttrib "Stationary Solver 1"
        fc1: FullyCoupled | linsolver = d1; initstep = 0.01; maxiter = 100
        d1: Direct "Direct (Merged)" | linsolver = pardiso
  sol26 "Parametric Solutions 2" (study std3)

Datasets
  dset8: Solution | solution = sol26
  dset6: Solution | solution = sol25
  dset7: Solution | solution = sol25
  dset28: Solution | solution = sol25
  dset29: Solution | solution = sol25
  dset30: Solution | solution = sol25

Plots
  pg100: PlotGroup2D "Plot_final_optimization_results" | data = dset30
    surf1: Surface "Design_veriable" | expr = gamma_p
      trn1: Transformation | move = {0, -2*L2}
    surf2: Surface "Forward_velocity" | expr = sqrt(u1^2+u2^2)
      trn1: Transformation | move = {0, -1*L2}
    str1: Streamline on boundaries 1
      expr = {u1, u2}
      selnumber = 8
      linetype = none
      pointtype = arrow
      arrowcount = 64
      arrowlength = proportional
      arrowscale = 0.07
      trn1: Transformation | move = {0, -1*L2}
    surf3: Surface "Wall_intensity" | expr = psi
    surf4: Surface "Backward_velocity" | expr = sqrt(v1^2+v2^2)
      trn1: Transformation | move = {0, -3*L2}
    str2: Streamline on boundaries 14
      expr = {v1, v2}
      selnumber = 8
      linetype = none
      pointtype = arrow
      arrowcount = 64
      arrowlength = proportional
      arrowscale = 0.05
      trn1: Transformation | move = {0, -3*L2}
    surf5: Surface "Forward_pressure" | expr = p
      trn1: Transformation | move = {0, -4*L2}
    con1: Contour | expr = gamma_p
      trn1: Transformation | move = {0, -4}
    surf6: Surface "Backward_pressure" | expr = p2
      trn1: Transformation | move = {0, -5*L2}
    con2: Contour | expr = gamma_p
      trn1: Transformation | move = {0, -5}